*STEP,NAME=Loading-1,NLGEOM=NO,INC=10000,SOLVER=ITERATIVE
*STATIC
0.05,1.0,1e-05,0.05
*CONTROLS,PARAMETERS=TIME INCREMENTATION
35,50,9,50,28,5,12,45
*CONTROLS,PARAMETER=LINE SEARCH
10
*SOLVER CONTROL
1e-05,200
*BOUNDARY,SUBMODEL,STEP=1
RVE_1.Sxy1,1,1,
RVE_1.Sxy1,2,2,
RVE_1.Sxy1,3,3,
RVE_1.Sxz0,1,1,
RVE_1.Sxz0,2,2,
RVE_1.Sxz0,3,3,
RVE_1.Sxz1,1,1,
RVE_1.Sxz1,2,2,
RVE_1.Sxz1,3,3,
RVE_1.Syz0,1,1,
RVE_1.Syz0,2,2,
RVE_1.Syz0,3,3,
RVE_1.Syz1,1,1,
RVE_1.Syz1,2,2,
RVE_1.Syz1,3,3,
*OUTPUT,FIELD,TIME INTERVAL=0.25
*ELEMENT OUTPUT,DIRECTIONS=YES
S
*NODE OUTPUT
U
*OUTPUT,FIELD,TIME INTERVAL=1.0
*ELEMENT OUTPUT,DIRECTIONS=YES
S,EVOL,SDV52,SDV53,SDV54,SDV55,SDV56,SDV57,SDV58,SDV59,SDV60,SDV61,SDV62,SDV63,SDV64,SDV65
SDV66,SDV67,SDV68,SDV69,SDV70,SDV71,SDV72,SDV73,SDV74,SDV75,SDV76,SDV77,SDV78,SDV79,SDV80,SDV81
SDV82,SDV83,SDV84,SDV85,SDV86,SDV87,SDV89,SDV90,SDV91,SDV92,SDV93,SDV94,SDV95,SDV96,SDV97,SDV98
SDV99,SDV100,SDV27,SDV26,SDV88,SDV14,SDV15,SDV16,SDV17,SDV18,SDV19,SDV20,SDV21,SDV22,SDV23,SDV24
SDV25
*NODE OUTPUT
U
*END STEP
*STEP,NAME=Loading-2,NLGEOM=NO,INC=10000,SOLVER=ITERATIVE
*STATIC
0.05,1.0,1e-05,0.05
*CONTROLS,PARAMETERS=TIME INCREMENTATION
35,50,9,50,28,5,12,45
*CONTROLS,PARAMETER=LINE SEARCH
10
*SOLVER CONTROL
1e-05,200
*BOUNDARY,SUBMODEL,STEP=2
RVE_1.Sxy1,1,1,
RVE_1.Sxy1,2,2,
RVE_1.Sxy1,3,3,
RVE_1.Sxz0,1,1,
RVE_1.Sxz0,2,2,
RVE_1.Sxz0,3,3,
RVE_1.Sxz1,1,1,
RVE_1.Sxz1,2,2,
RVE_1.Sxz1,3,3,
RVE_1.Syz0,1,1,
RVE_1.Syz0,2,2,
RVE_1.Syz0,3,3,
RVE_1.Syz1,1,1,
RVE_1.Syz1,2,2,
RVE_1.Syz1,3,3,
*OUTPUT,FIELD,TIME INTERVAL=0.25
*ELEMENT OUTPUT,DIRECTIONS=YES
S
*NODE OUTPUT
U
*OUTPUT,FIELD,TIME INTERVAL=1.0
*ELEMENT OUTPUT,DIRECTIONS=YES
S,EVOL,SDV52,SDV53,SDV54,SDV55,SDV56,SDV57,SDV58,SDV59,SDV60,SDV61,SDV62,SDV63,SDV64,SDV65
SDV66,SDV67,SDV68,SDV69,SDV70,SDV71,SDV72,SDV73,SDV74,SDV75,SDV76,SDV77,SDV78,SDV79,SDV80,SDV81
SDV82,SDV83,SDV84,SDV85,SDV86,SDV87,SDV89,SDV90,SDV91,SDV92,SDV93,SDV94,SDV95,SDV96,SDV97,SDV98
SDV99,SDV100,SDV27,SDV26,SDV88,SDV14,SDV15,SDV16,SDV17,SDV18,SDV19,SDV20,SDV21,SDV22,SDV23,SDV24
SDV25
*NODE OUTPUT
U
*END STEP
*STEP,NAME=Loading-3,NLGEOM=NO,INC=10000,SOLVER=ITERATIVE
*STATIC
0.05,1.0,1e-05,0.05
*CONTROLS,PARAMETERS=TIME INCREMENTATION
35,50,9,50,28,5,12,45
*CONTROLS,PARAMETER=LINE SEARCH
10
*SOLVER CONTROL
1e-05,200
*BOUNDARY,SUBMODEL,STEP=3
RVE_1.Sxy1,1,1,
RVE_1.Sxy1,2,2,
RVE_1.Sxy1,3,3,
RVE_1.Sxz0,1,1,
RVE_1.Sxz0,2,2,
RVE_1.Sxz0,3,3,
RVE_1.Sxz1,1,1,
RVE_1.Sxz1,2,2,
RVE_1.Sxz1,3,3,
RVE_1.Syz0,1,1,
RVE_1.Syz0,2,2,
RVE_1.Syz0,3,3,
RVE_1.Syz1,1,1,
RVE_1.Syz1,2,2,
RVE_1.Syz1,3,3,
*OUTPUT,FIELD,TIME INTERVAL=0.25
*ELEMENT OUTPUT,DIRECTIONS=YES
S
*NODE OUTPUT
U
*OUTPUT,FIELD,TIME INTERVAL=1.0
*ELEMENT OUTPUT,DIRECTIONS=YES
S,EVOL,SDV52,SDV53,SDV54,SDV55,SDV56,SDV57,SDV58,SDV59,SDV60,SDV61,SDV62,SDV63,SDV64,SDV65
SDV66,SDV67,SDV68,SDV69,SDV70,SDV71,SDV72,SDV73,SDV74,SDV75,SDV76,SDV77,SDV78,SDV79,SDV80,SDV81
SDV82,SDV83,SDV84,SDV85,SDV86,SDV87,SDV89,SDV90,SDV91,SDV92,SDV93,SDV94,SDV95,SDV96,SDV97,SDV98
SDV99,SDV100,SDV27,SDV26,SDV88,SDV14,SDV15,SDV16,SDV17,SDV18,SDV19,SDV20,SDV21,SDV22,SDV23,SDV24
SDV25
*NODE OUTPUT
U
*END STEP
*STEP,NAME=Loading-4,NLGEOM=NO,INC=10000,SOLVER=ITERATIVE
*STATIC
0.05,1.0,1e-05,0.05
*CONTROLS,PARAMETERS=TIME INCREMENTATION
35,50,9,50,28,5,12,45
*CONTROLS,PARAMETER=LINE SEARCH
10
*SOLVER CONTROL
1e-05,200
*BOUNDARY,SUBMODEL,STEP=4
RVE_1.Sxy1,1,1,
RVE_1.Sxy1,2,2,
RVE_1.Sxy1,3,3,
RVE_1.Sxz0,1,1,
RVE_1.Sxz0,2,2,
RVE_1.Sxz0,3,3,
RVE_1.Sxz1,1,1,
RVE_1.Sxz1,2,2,
RVE_1.Sxz1,3,3,
RVE_1.Syz0,1,1,
RVE_1.Syz0,2,2,
RVE_1.Syz0,3,3,
RVE_1.Syz1,1,1,
RVE_1.Syz1,2,2,
RVE_1.Syz1,3,3,
*OUTPUT,FIELD,TIME INTERVAL=0.25
*ELEMENT OUTPUT,DIRECTIONS=YES
S
*NODE OUTPUT
U
*OUTPUT,FIELD,TIME INTERVAL=1.0
*ELEMENT OUTPUT,DIRECTIONS=YES
S,EVOL,SDV52,SDV53,SDV54,SDV55,SDV56,SDV57,SDV58,SDV59,SDV60,SDV61,SDV62,SDV63,SDV64,SDV65
SDV66,SDV67,SDV68,SDV69,SDV70,SDV71,SDV72,SDV73,SDV74,SDV75,SDV76,SDV77,SDV78,SDV79,SDV80,SDV81
SDV82,SDV83,SDV84,SDV85,SDV86,SDV87,SDV89,SDV90,SDV91,SDV92,SDV93,SDV94,SDV95,SDV96,SDV97,SDV98
SDV99,SDV100,SDV27,SDV26,SDV88,SDV14,SDV15,SDV16,SDV17,SDV18,SDV19,SDV20,SDV21,SDV22,SDV23,SDV24
SDV25
*NODE OUTPUT
U
*END STEP
*STEP,NAME=Loading-5,NLGEOM=NO,INC=10000,SOLVER=ITERATIVE
*STATIC
0.05,1.0,1e-05,0.05
*CONTROLS,PARAMETERS=TIME INCREMENTATION
35,50,9,50,28,5,12,45
*CONTROLS,PARAMETER=LINE SEARCH
10
*SOLVER CONTROL
1e-05,200
*BOUNDARY,SUBMODEL,STEP=5
RVE_1.Sxy1,1,1,
RVE_1.Sxy1,2,2,
RVE_1.Sxy1,3,3,
RVE_1.Sxz0,1,1,
RVE_1.Sxz0,2,2,
RVE_1.Sxz0,3,3,
RVE_1.Sxz1,1,1,
RVE_1.Sxz1,2,2,
RVE_1.Sxz1,3,3,
RVE_1.Syz0,1,1,
RVE_1.Syz0,2,2,
RVE_1.Syz0,3,3,
RVE_1.Syz1,1,1,
RVE_1.Syz1,2,2,
RVE_1.Syz1,3,3,
*OUTPUT,FIELD,TIME INTERVAL=0.25
*ELEMENT OUTPUT,DIRECTIONS=YES
S
*NODE OUTPUT
U
*OUTPUT,FIELD,TIME INTERVAL=1.0
*ELEMENT OUTPUT,DIRECTIONS=YES
S,EVOL,SDV52,SDV53,SDV54,SDV55,SDV56,SDV57,SDV58,SDV59,SDV60,SDV61,SDV62,SDV63,SDV64,SDV65
SDV66,SDV67,SDV68,SDV69,SDV70,SDV71,SDV72,SDV73,SDV74,SDV75,SDV76,SDV77,SDV78,SDV79,SDV80,SDV81
SDV82,SDV83,SDV84,SDV85,SDV86,SDV87,SDV89,SDV90,SDV91,SDV92,SDV93,SDV94,SDV95,SDV96,SDV97,SDV98
SDV99,SDV100,SDV27,SDV26,SDV88,SDV14,SDV15,SDV16,SDV17,SDV18,SDV19,SDV20,SDV21,SDV22,SDV23,SDV24
SDV25
*NODE OUTPUT
U
*END STEP
